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/batch
! ANSYS input file written by Workbench version 18.2 RELEASE
! File used for geometry attach: C:\Users\Cengizhan Topçu\Desktop\Bilgisayar Destekli Tasarým\Ödevler\Ödev-4\Tasarým Ödev-4_files\dp0\SYS\DM\SYS.agdb
/title,Tasar_m _dev-4--Transient (A5)
/com,--- Data in consistent NMM units. See Solving Units in the help system for more information.
/units,MPA
/prep7
! Turn off shape checking because checks already performed inside WB mesher.
! See help system for more information.
SHPP,OFF,,NOWARN
etcon,set             ! allow ANSYS to choose best KEYOP's for 180x elements
/com,*********** Nodes for the whole assembly ***********
nblock,3,,16667
(1i9,3e20.9e3)
        1    7.233618976E+001    1.542987252E+003   -6.629590109E+000
        2    7.233618976E+001    1.542987252E+003    6.629590109E+000
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-1
/com,*********** Nodes for all Remote Points ***********
nblock,3
(1i9,3e20.9e3)
    15153    2.988042797E+002   -1.500000060E+002   -5.254783559E-015
    15154    2.988042797E+002   -1.500000060E+002   -5.254783559E-015
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-1
/com,*********** Elements for Body 1 "Direk" ***********
et,1,187
eblock,19,solid,,4346
(19i9)
        1        1        1        1        0        0        0        0       10        0     3228     6516     7484     7187     7145     8011    13101     8009     8006
    12856    12854
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-1
/com,*********** Elements for Body 2 "Kol" ***********
et,2,187
eblock,19,solid,,2116
(19i9)
        2        2        2        2        0        0        0        0       10        0     1112     2438     2917     2645     2644     4088     5458     4084     4083
     5452     5447
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-1
/com,*********** Elements for Body 3 "Silindir" ***********
et,3,187
eblock,19,solid,,646
(19i9)
        3        3        3        3        0        0        0        0       10        0      466     1022     1088     1166     1127     1356     1737     1360     1359
     1736     1921
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-1
/com,*********** Elements for Body 4 "Piston" ***********
et,4,187
eblock,19,solid,,465
(19i9)
        4        4        4        4        0        0        0        0       10        0        1        6       86       89      172      219      618      221      224
      621      633
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-1
/com,*********** Send User Defined Coordinate System(s) ***********
local,12,0,298.804279711237,-150.000005960464,-5.25478355866755e-015,0.,90.,0.
local,13,0,32.4691734194534,1281.05671491913,1.46620017750174e-014,77.261742475528,0.,180.
local,14,0,-334.957492720649,1609.42982254951,0.,-0.,0.,180.
local,15,0,113.808521092501,1640.86746606258,1.73472347597681e-015,-180.,0.,-180.
local,16,0,-53.6333866823382,900.175533647181,-6.93889390390723e-015,-180.,0.,-180.
csys,0
toffst,273.15,  ! Temperature offset from absolute zero
/com,*********** Set Reference Temperature ***********
tref,22.
/com,*********** Send Materials ***********
MP,DENS,1,7.85e-09,	! tonne mm^-3
MP,ALPX,1,1.2e-05,	! C^-1
MP,C,1,434000000,	! mm^2 s^-2 C^-1
MP,KXX,1,60.5,	! tonne mm s^-3 C^-1
MP,RSVX,1,0.00017,	! ohm mm
MP,EX,1,200000,	! tonne s^-2 mm^-1
MP,NUXY,1,0.3,
MP,MURX,1,10000,

MP,DENS,2,7.85e-09,	! tonne mm^-3
MP,ALPX,2,1.2e-05,	! C^-1
MP,C,2,434000000,	! mm^2 s^-2 C^-1
MP,KXX,2,60.5,	! tonne mm s^-3 C^-1
MP,RSVX,2,0.00017,	! ohm mm
MP,EX,2,200000,	! tonne s^-2 mm^-1
MP,NUXY,2,0.3,
MP,MURX,2,10000,

MP,DENS,3,7.85e-09,	! tonne mm^-3
MP,ALPX,3,1.2e-05,	! C^-1
MP,C,3,434000000,	! mm^2 s^-2 C^-1
MP,KXX,3,60.5,	! tonne mm s^-3 C^-1
MP,RSVX,3,0.00017,	! ohm mm
MP,EX,3,200000,	! tonne s^-2 mm^-1
MP,NUXY,3,0.3,
MP,MURX,3,10000,

MP,DENS,4,7.85e-09,	! tonne mm^-3
MP,ALPX,4,1.2e-05,	! C^-1
MP,C,4,434000000,	! mm^2 s^-2 C^-1
MP,KXX,4,60.5,	! tonne mm s^-3 C^-1
MP,RSVX,4,0.00017,	! ohm mm
MP,EX,4,200000,	! tonne s^-2 mm^-1
MP,NUXY,4,0.3,
MP,MURX,4,10000,

!************************* Model Summary ********************
!Direk,	Structural Steel,	matid,	1
!Kol,	Structural Steel,	matid,	2
!Silindir,	Structural Steel,	matid,	3
!Piston,	Structural Steel,	matid,	4
!************************* End Model Summary ********************
/com,*********** Create Remote Point "Internal Remote Point 4" ***********
! -------- Remote Point Used by "Fixed - Ground To Direk" --------
*set,tid,6
*set,cid,5
et,cid,174
et,tid,170
keyo,tid,2,1               ! Don't fix the pilot node
keyo,tid,4,0               ! Activate all DOF's due to large deformation
keyo,cid,12,5              ! Bonded Contact
keyo,cid,4,2               ! Rigid CERIG style load
keyo,cid,2,2               ! MPC style contact
eblock,10,,,148
(15i9)
     7589        5        5        5        0     6793     7414     6804     6804    10529    10612     6804    10524
     7590        5        5        5        0     6794     7415     6803     6803    10539    10604     6803    10534
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-1
*set,_npilot,15154
_npilot129=_npilot
type,tid
mat ,cid
real,cid
tshape,pilo
en,7737,_npilot
tshape
csys,12
nrot,15154
csys,0
/com,*********** Create Remote Point "Internal Remote Point 10" ***********
! -------- Remote Point Used by "Translational - Silindir To Piston" --------
*set,tid,8
*set,cid,7
et,cid,174
et,tid,170
keyo,tid,2,1               ! Don't fix the pilot node
keyo,tid,4,0               ! Activate all DOF's due to large deformation
keyo,cid,12,5              ! Bonded Contact
keyo,cid,4,2               ! Rigid CERIG style load
keyo,cid,2,2               ! MPC style contact
eblock,10,,,126
(15i9)
     7738        7        7        7        0     1098     1026     1164     1164     1392     1398     1164     1779
     7739        7        7        7        0     1027     1098     1164     1164     1405     1779     1164     1411
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-1
*set,_npilot,15155
_npilot166=_npilot
type,tid
mat ,cid
real,cid
tshape,pilo
en,7864,_npilot
tshape
csys,13
nrot,15155
csys,0
/com,*********** Create Remote Point "Internal Remote Point 11" ***********
! -------- Remote Point Used by "Translational - Silindir To Piston" --------
*set,tid,10
*set,cid,9
et,cid,174
et,tid,170
keyo,tid,2,1               ! Don't fix the pilot node
keyo,tid,4,0               ! Activate all DOF's due to large deformation
keyo,cid,12,5              ! Bonded Contact
keyo,cid,4,2               ! Rigid CERIG style load
keyo,cid,2,2               ! MPC style contact
eblock,10,,,156
(15i9)
     7865        9        9        9        0       13       10       21       21      247      250       21      265
     7866        9        9        9        0       11        8       19       19      234      237       19      254
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-1
*set,_npilot,15156
_npilot167=_npilot
type,tid
mat ,cid
real,cid
tshape,pilo
en,8021,_npilot
tshape
csys,13
nrot,15156
csys,0
/com,*********** Create Remote Point "Internal Remote Point" ***********
! -------- Remote Point Used by "Revolute - Kol To Direk" --------
*set,tid,12
*set,cid,11
et,cid,174
et,tid,170
keyo,tid,2,1               ! Don't fix the pilot node
keyo,tid,4,0               ! Activate all DOF's due to large deformation
keyo,cid,12,5              ! Bonded Contact
keyo,cid,4,2               ! Rigid CERIG style load
keyo,cid,2,2               ! MPC style contact
eblock,10,,,32
(15i9)
     8022       11       11       11        0     2384     2516     2523     2523     3619     4693     2523     3621
     8023       11       11       11        0     2382     2385     2518     2518     3598     3630     2518     3600
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-1
*set,_npilot,15157
_npilot183=_npilot
type,tid
mat ,cid
real,cid
tshape,pilo
en,8054,_npilot
tshape
csys,14
nrot,15157
csys,0
/com,*********** Create Remote Point "Internal Remote Point 6" ***********
! -------- Remote Point Used by "Revolute - Kol To Direk" --------
*set,tid,14
*set,cid,13
et,cid,174
et,tid,170
keyo,tid,2,1               ! Don't fix the pilot node
keyo,tid,4,0               ! Activate all DOF's due to large deformation
keyo,cid,12,5              ! Bonded Contact
keyo,cid,4,2               ! Rigid CERIG style load
keyo,cid,2,2               ! MPC style contact
eblock,10,,,32
(15i9)
     8055       13       13       13        0     6574     6599     6602     6602     8575     8816     6602     8576
     8056       13       13       13        0     6571     6575     6599     6599     8545     8586     6599     8546
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-1
*set,_npilot,15158
_npilot184=_npilot
type,tid
mat ,cid
real,cid
tshape,pilo
en,8087,_npilot
tshape
csys,14
nrot,15158
csys,0
/com,*********** Create Remote Point "Internal Remote Point 7" ***********
! -------- Remote Point Used by "Revolute - Piston To Kol" --------
*set,tid,16
*set,cid,15
et,cid,174
et,tid,170
keyo,tid,2,1               ! Don't fix the pilot node
keyo,tid,4,0               ! Activate all DOF's due to large deformation
keyo,cid,12,5              ! Bonded Contact
keyo,cid,4,2               ! Rigid CERIG style load
keyo,cid,2,2               ! MPC style contact
eblock,10,,,32
(15i9)
     8088       15       15       15        0       78       55       82       82      488      489       82      594
     8089       15       15       15        0       57       53       80       80      469      473       80      505
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-1
*set,_npilot,15159
_npilot191=_npilot
type,tid
mat ,cid
real,cid
tshape,pilo
en,8120,_npilot
tshape
csys,15
nrot,15159
csys,0
/com,*********** Create Remote Point "Internal Remote Point 8" ***********
! -------- Remote Point Used by "Revolute - Piston To Kol" --------
*set,tid,18
*set,cid,17
et,cid,174
et,tid,170
keyo,tid,2,1               ! Don't fix the pilot node
keyo,tid,4,0               ! Activate all DOF's due to large deformation
keyo,cid,12,5              ! Bonded Contact
keyo,cid,4,2               ! Rigid CERIG style load
keyo,cid,2,2               ! MPC style contact
eblock,10,,,32
(15i9)
     8121       17       17       17        0     2416     2421     2424     2424     3932     3972     2424     3933
     8122       17       17       17        0     2415     2419     2423     2423     3921     3955     2423     3922
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-1
*set,_npilot,15160
_npilot192=_npilot
type,tid
mat ,cid
real,cid
tshape,pilo
en,8153,_npilot
tshape
csys,15
nrot,15160
csys,0
/com,*********** Create Remote Point "Internal Remote Point 9" ***********
! -------- Remote Point Used by "Revolute - Silindir To Direk" --------
*set,tid,20
*set,cid,19
et,cid,174
et,tid,170
keyo,tid,2,1               ! Don't fix the pilot node
keyo,tid,4,0               ! Activate all DOF's due to large deformation
keyo,cid,12,5              ! Bonded Contact
keyo,cid,4,2               ! Rigid CERIG style load
keyo,cid,2,2               ! MPC style contact
eblock,10,,,32
(15i9)
     8154       19       19       19        0     1066     1071     1075     1075     1664     1694     1075     1665
     8155       19       19       19        0     1074     1063     1067     1067     1644     1642     1067     1672
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-1
*set,_npilot,15161
_npilot199=_npilot
type,tid
mat ,cid
real,cid
tshape,pilo
en,8186,_npilot
tshape
csys,16
nrot,15161
csys,0
/com,*********** Create Remote Point "Internal Remote Point 12" ***********
! -------- Remote Point Used by "Revolute - Silindir To Direk" --------
*set,tid,22
*set,cid,21
et,cid,174
et,tid,170
keyo,tid,2,1               ! Don't fix the pilot node
keyo,tid,4,0               ! Activate all DOF's due to large deformation
keyo,cid,12,5              ! Bonded Contact
keyo,cid,4,2               ! Rigid CERIG style load
keyo,cid,2,2               ! MPC style contact
eblock,10,,,32
(15i9)
     8187       21       21       21        0     6662     6667     6670     6670     9344     9387     6670     9345
     8188       21       21       21        0     6659     6663     6667     6667     9314     9353     6667     9315
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-1
*set,_npilot,15162
_npilot200=_npilot
type,tid
mat ,cid
real,cid
tshape,pilo
en,8219,_npilot
tshape
csys,16
nrot,15162
csys,0
/com,*********** Create Bearing Load ***********
et,23,154
eblock,10,,,16
(15i9)
     8220       23       23       23        0     2488     2492     2498     2498     4493     4525     2498     4496
     8221       23       23       23        0     2492     2499     2502     2502     4526     4588     2502     4527
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-1
esel,s,type,,23
keyop,23,7,1                ! Use original area so load is constant in large deformation
esel,all
/com,*********** Create Joint "Fixed - Ground To Direk" ***********
! Joint Element Type Declaration and Definition using MPC184
*set,_jid,24
et,_jid,184
keyo,_jid,1,13          ! Fixed Joint
sectype,_jid, joint, weld, _wbjoint
secjoint,,12,12
mat,_jid
real,_jid
type,_jid
secnum,_jid
en,7584,,15154        ! body to ground joint
/com,*********** Create Joint "Translational - Silindir To Piston" ***********
! Joint Element Type Declaration and Definition using MPC184
*set,_jid,25
et,_jid,184
keyo,_jid,1,10          ! Prismatic Joint
sectype,_jid, joint, pris, _wbjoint
secjoint,,13,13
mat,_jid
real,_jid
type,_jid
secnum,_jid
en,7585,15155,15156      ! body to body joint
/com,*********** Create Joint "Revolute - Kol To Direk" ***********
! Joint Element Type Declaration and Definition using MPC184
*set,_jid,26
et,_jid,184
keyo,_jid,1,6           ! Revolute Joint
keyo,_jid,4,1           ! Z Axis is revolute axis
sectype,_jid, joint, revo, _wbjoint
secjoint,,14,14
mat,_jid
real,_jid
type,_jid
secnum,_jid
en,7586,15157,15158      ! body to body joint
/com,*********** Create Joint "Revolute - Piston To Kol" ***********
! Joint Element Type Declaration and Definition using MPC184
*set,_jid,27
et,_jid,184
keyo,_jid,1,6           ! Revolute Joint
keyo,_jid,4,1           ! Z Axis is revolute axis
sectype,_jid, joint, revo, _wbjoint
secjoint,,15,15
mat,_jid
real,_jid
type,_jid
secnum,_jid
en,7587,15159,15160      ! body to body joint
/com,*********** Create Joint "Revolute - Silindir To Direk" ***********
! Joint Element Type Declaration and Definition using MPC184
*set,_jid,28
et,_jid,184
keyo,_jid,1,6           ! Revolute Joint
keyo,_jid,4,1           ! Z Axis is revolute axis
sectype,_jid, joint, revo, _wbjoint
secjoint,,16,16
mat,_jid
real,_jid
type,_jid
secnum,_jid
en,7588,15161,15162      ! body to body joint
/com,*********** Create Joint Drivers **********

*DIM,_loadvari176,TABLE,1,1,1,TIME,
! Time values
_loadvari176(1,0,1) = 10.
! Load values
_loadvari176(1,1,1) = -30.

fini
/com,****************************************************************************
/com,*************************    SOLUTION       ********************************
/com,****************************************************************************
/solu
antype,4                   ! transient analysis
nlgeom,on                  ! Turn on Large Deformation Effects
kbc,1                      ! stepped BC's
eqsl,sparse,,,,,1
cntr,print,1               ! print out contact info and also make no initial contact an error
dmpoption,emat,no             ! Don't combine emat file for DANSYS
dmpoption,esav,no             ! Don't combine esav file for DANSYS
trnopt,full,,,,,hht        ! HHT time integration method
tintp,0.1   ! Numerical Damping
nldiag,cont,iter           ! print out contact info each equilibrium iteration
rescontrol,define,last,last,,dele	   ! Program Controlled
/com,****************************************************
/com,******************* SOLVE FOR LS 1 OF 1 ****************
esel,s,type,,23
sfe,all,5,pres,0,0.0,1.,0.,0.
local,11,0,0,0,0,-90.,0.,-0.
csys,0
*set,_v1,0.
*set,_v2,-1.
*set,_v3,0.
*get,_necurr,elem,,count
_ecurr=0
_total=0
*do,_i,1,_necurr
  _ecurr = ELNEXT(_ecurr)
  _normx = NORMNX(NELEM(_ecurr,1),NELEM(_ecurr,2),NELEM(_ecurr,3))
  _normy = NORMNY(NELEM(_ecurr,1),NELEM(_ecurr,2),NELEM(_ecurr,3))
  _normz = NORMNZ(NELEM(_ecurr,1),NELEM(_ecurr,2),NELEM(_ecurr,3))
  _normmag = sqrt(_normx*_normx + _normy*_normy + _normz*_normz )
  _normx = _normx/_normmag
  _normy = _normy/_normmag
  _normz = _normz/_normmag
  _dot = _normx*_v1+_normy*_v2+_normz*_v3
  *if,_dot,gt,-.00001,then
    esel,u,elem,,_ecurr
  *else
    csys,11
    *get,_indd,elem,_ecurr,aproj,x
    csys,0
    _total=_total+_indd
  *endif
*enddo
*get,_necurr,elem,,count
*if,_necurr,eq,0,then
  *msg,error
  NO ELEMENTS ARE SELECTED TO APPLY BEARING LOAD TO. &
  IT IS LIKELY THAT THE BEARING LOAD IS IN THE WRONG DIRECTION
*endif
*set,_mag,5000.
_mag=_mag/_total
sfe,all,5,pres,0,_mag,0.,-5000.,0.
nsel,all
esel,all
esel,s,type,,25
dj,all,velx,%_loadvari176%
esel,all
autots,on                   ! User turned on automatic time stepping
deltim,0.01,0.01,0.05,OFF
time,10.
timint,on                  ! Turn on time integration effects
outres,erase
outres,all,none
outres,nsol,all
outres,rsol,all
outres,strs,all
outres,epel,all
outres,eppl,all
outres,v,all
outres,a,all
esel,s,mat,,24
esel,a,mat,,25,28
cm,_elmisc,elem
esel,all
outres,misc,all,_elmisc
stabilize,off                   ! Stabilization turned OFF by user
! *********** WB SOLVE COMMAND ***********
! check interactive state
*get,ANSINTER_,active,,int
*if,ANSINTER_,ne,0,then
/eof
*endif
solve
/com *************** Write FE CONNECTORS *********
CEWRITE,file,ce,,INTE
/com,****************************************************
/com,*************** FINISHED SOLVE FOR LS 1 *************
/post1
fini
